*Heading
** Job name: 27elements Model name: Model-1
** Generated by: Abaqus/CAE 2017
*Preprint, echo=NO, model=NO, history=NO, contact=NO
**
** PARTS
**
*Part, name=Part-3
*Node
      1, 0.00499999989, 0.00499999989, 0.00499999989
      2, 0.00499999989, 0.00481481478, 0.00499999989
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*Element, type=C3D8
    1,   785,   786,   814,   813,     1,     2,    30,    29
    2,   786,   787,   815,   814,     2,     3,    31,    30
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*Nset, nset=_PickedSet9, internal, generate
     1,  21952,      1
*Elset, elset=_PickedSet9, internal, generate
     1,  19683,      1
** Section: Section-2
*Solid Section, elset=_PickedSet9, material=neohookean
,
*End Part
**
**
** ASSEMBLY
**
*Assembly, name=Assembly
**
*Instance, name=Part-3-1, part=Part-3
*End Instance
**
*Node
      1,           0., 0.00499999989, 0.00249999994
*Node
      2, 0.00499999989, 0.00499999989, 0.00249999994
*Node
      3, 0.00499999989,           0., 0.00249999994
*Node
      4,           0.,           0., 0.00249999994
*Nset, nset=xnodes, instance=Part-3-1
 21169, 21196, 21925, 21952
*Nset, nset=xnodes2el, instance=Part-3-1
 21169, 21196, 21925, 21952
*Nset, nset=xnodes2el
 1, 4
*Nset, nset=yloadnodes, instance=Part-3-1
     1,   757, 21169, 21925
*Nset, nset=yloadnodes2el, instance=Part-3-1
     1,   757, 21169, 21925
*Nset, nset=yloadnodes2el
 1, 2
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*Nset, nset=_PickedSet35, internal, instance=Part-3-1, generate
 21169,  21952,      1
*Elset, elset=_PickedSet35, internal, instance=Part-3-1, generate
 18955,  19683,      1
*Nset, nset=_PickedSet37, internal, instance=Part-3-1, generate
    28,  21952,     28
*Elset, elset=_PickedSet37, internal, instance=Part-3-1, generate
    27,  19683,     27
*Nset, nset=_PickedSet38, internal, instance=Part-3-1
   757,   758,   759,   760,   761,   762
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*Elset, elset=_PickedSet38, internal, instance=Part-3-1
   703,   704,   705,   706,   707,   708
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*Nset, nset=_PickedSet39, internal, instance=Part-3-1, generate
     1,  21925,     28
*Elset, elset=_PickedSet39, internal, instance=Part-3-1, generate
     1,  19657,     27
*End Assembly
*Amplitude, name=Amp-1
             0.,              0.,             0.1,              1.
**
** MATERIALS
**
*Material, name=neohookean
*Density
1040.,
*Hyperelastic, neo hooke
50., 0.012
** ----------------------------------------------------------------
**
** STEP: Step-1
**
*Step, name=Step-1, nlgeom=YES
*Dynamic, Explicit
, 0.1
*Bulk Viscosity
0., 0.
**
** BOUNDARY CONDITIONS
**
** Name: BC-9 Type: Displacement/Rotation
*Boundary
_PickedSet35, 1, 1
** Name: BC-10 Type: Displacement/Rotation
*Boundary
_PickedSet38, 3, 3
** Name: BC-11 Type: Displacement/Rotation
*Boundary
_PickedSet37, 2, 2
** Name: BC-12 Type: Displacement/Rotation
*Boundary, amplitude=Amp-1
_PickedSet39, 2, 2, 0.007
**
** OUTPUT REQUESTS
**
*Restart, write, number interval=1, time marks=NO
**
** FIELD OUTPUT: F-Output-1
**
*Output, field
*Node Output
A, AR, AT, CF, RF, RM, RT, U
UR, UT, V, VR, VT
*Element Output, directions=YES
BF, GRAV, HP, IWCONWEP, NFORC, NFORCSO, P, SBF, SF, STAGP, TRNOR, TRSHR, VP
*Output, history, frequency=0
*End Step
