*************************************
*HEADING
ICEM - ABAQUS INTERFACES VERSION 4.3.1
*************************************
*MATERIAL, NAME=mat0
*MATERIAL, NAME=mat1
*NODE, NSET=All
9737, -4.79567154E-01, -6.14614427E-01,  6.25799648E-01
9738, -5.74020832E-01, -5.74020832E-01,  5.83686139E-01
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*ELEMENT,TYPE=C3D8,ELSET=BRAIN_ELSET
         3,      8281,      8282,      8284,      8283,         5,         6,         8,         7
         4,         5,         6,         8,         7,         9,        10,        12,        11
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*ELEMENT,TYPE=C3D8,ELSET=CSF_ELSET
      9318,     10428,     10429,     10431,     10430,      8281,      8282,      8284,      8283
      9319,     10430,     10431,     10433,     10432,      8283,      8284,      8290,      8289
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*ELEMENT,TYPE=C3D8,ELSET=SKULL_ELSET
     10044,      9737,      9738,      9740,      9739,     10428,     10429,     10431,     10430
     10045,      9739,      9740,      9742,      9741,     10430,     10431,     10433,     10432
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*SOLID SECTION, ELSET=BRAIN_ELSET, MATERIAL=mat0
*SOLID SECTION, ELSET=CSF_ELSET, MATERIAL=mat1
*SOLID SECTION, ELSET=SKULL_ELSET, MATERIAL=mat0
*NSET,NSET=BRAIN_NSET
      8281,      8282,      8283,      8284,         5,         6
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*NSET,NSET=CSF_NSET
     10428,     10429,     10430,     10431,      8281,      8282
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*NSET,NSET=SKULL_NSET
      9737,      9738,      9739,      9740,     10428,     10429
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*ELSET,ELSET=SET:ELEMENT:skull
     10044,     10045,     10046,     10047,     10048,     10049
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*ELSET,ELSET=SET:ELEMENT:csf
      9318,      9319,      9320,      9321,      9322,      9323
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*ELSET,ELSET=SET:ELEMENT:brain
         3,         4,         5,         6,         7,         8
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