*Heading
** Job name: PlateImpact_v1_d Model name: Model-1
** Generated by: Abaqus/CAE 2017
*Preprint, echo=NO, model=NO, history=NO, contact=NO
**
** PARTS
**
*Part, name=Ball
*Node
      1, -0.00197212794, -0.00671645068,           0.
      2, -0.00378448563, -0.00588877453,           0.
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*Element, type=C3D10M
   1,  196,  197,  198,  199,  385,  384,  383,  387,  386,  388
   2,  196,  200,  197,  199,  390,  389,  385,  387,  391,  386
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*Nset, nset=Projectile, generate
    1,  2584,     1
*Elset, elset=Projectile, generate
    1,  1628,     1
** Section: Projectile
*Solid Section, elset=Projectile, material=HardSteel
,
*End Part
**
*Part, name=Plate
*Node
      1, 0.0814584494, -0.0607213341,           0.
      2, 0.0880308449, -0.0507260263,           0.
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*Element, type=C3D8R
   1,  3223,  2630,  3131,  3239,   614,    21,   522,   630
   2,  3333,  3404,  3428,  3084,   724,   795,   819,   475
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*Nset, nset=Plate, generate
     1,  10436,      1
*Elset, elset=Plate, generate
    1,  7584,     1
** Section: Plate
*Solid Section, elset=Plate, controls=EC-1, material=PlateJC
,
*End Part
**
**
** ASSEMBLY
**
*Assembly, name=Assembly
**
*Instance, name=Plate-1, part=Plate
*End Instance
**
*Instance, name=Ball-1, part=Ball
          0.,           0.,        0.025
*End Instance
**
*Nset, nset=PlateEdge, instance=Plate-1
    1,    2,    3,    4,    5,    6
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*Elset, elset=PlateEdge, instance=Plate-1
    1,   12,   14,   16,   18,   19
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*Nset, nset=Projectile, instance=Ball-1
    1,    2,    3,    4,    5,    6
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*Elset, elset=Projectile, instance=Ball-1
   17,   27,   28,   30,   40,   51
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*End Assembly
**
** ELEMENT CONTROLS
**
*Section Controls, name=EC-1, ELEMENT DELETION=YES
1., 1., 1.
**
** MATERIALS
**
*Material, name=HardSteel
*Density
8000.,
*Elastic
 2.2e+11, 0.3
*Material, name=PlateJC
*Damage Initiation, criterion=JOHNSON COOK
 0.05,    0.8,  -0.44, -0.046,     0.,     0.,     0.,  7.389
*Damage Evolution, type=ENERGY
41671.,
*Density
8000.,
*Elastic
 1.93e+11, 0.25
*Plastic, hardening=JOHNSON COOK
 1e+08, 2e+09,  0,   0,    0.,    0.
*Rate Dependent, type=JOHNSON COOK
 0.0026, 1e-4
**
** INTERACTION PROPERTIES
**
*Surface Interaction, name=IntProp-1
*Friction
 0.25,
**
** BOUNDARY CONDITIONS
**
** Name: PlateEdge Type: Displacement/Rotation
*Boundary
PlateEdge, 1, 1
PlateEdge, 2, 2
PlateEdge, 3, 3
PlateEdge, 4, 4
PlateEdge, 5, 5
PlateEdge, 6, 6
**
** PREDEFINED FIELDS
**
** Name: ProjectileVelocity   Type: Velocity
*Initial Conditions, type=VELOCITY
Projectile, 1, 0.
Projectile, 2, 0.
Projectile, 3, -600.
**
** INTERACTIONS
**
** Interaction: Int-1
*Contact, op=NEW
*Contact Inclusions, ALL EXTERIOR
*Contact Property Assignment
 ,  , IntProp-1
** ----------------------------------------------------------------
**
** STEP: Step-1
**
*Step, name=Step-1, nlgeom=YES
*Dynamic, Explicit
, 0.002,, 0.001
*Bulk Viscosity
0.06, 1.2
**
** OUTPUT REQUESTS
**
*Restart, write, number interval=1, time marks=NO
**
** FIELD OUTPUT: F-Output-1
**
*Output, field, number interval=100
*Node Output
A, RF, U, V
*Element Output, directions=YES
DMICRT, EVF, LE, PE, PEEQ, PEEQVAVG, PEVAVG, S, STATUS, SVAVG
*Contact Output
CSTRESS,
**
** HISTORY OUTPUT: H-Output-1
**
*Output, history, variable=PRESELECT
*End Step
