*Heading
** Job name: PlateImpact_v2_2 Model name: PlateFEMTECH2
** Generated by: Abaqus/CAE 2017
*Preprint, echo=NO, model=NO, history=NO, contact=NO
**
** PARTS
**
*Part, name=SteelProjectile
*Node
      1,           0., 0.00476250006,           0.
      2, 0.00368597172, -0.00301579502,           0.
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*Element, type=C3D4
  1, 202, 203, 204, 205
  2, 202, 206, 207, 208
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*Nset, nset=_PickedSet2, internal, generate
   1,  301,    1
*Elset, elset=_PickedSet2, internal, generate
    1,  1215,     1
*Nset, nset=All, generate
   1,  301,    1
*Elset, elset=All, generate
    1,  1215,     1
** Section: HardStee
*Solid Section, elset=_PickedSet2, material=HardSteel
,
*End Part
**
*Part, name=TargetPlate
*Node
      1, -0.0253999997,           0.,           0.
      2,           0., 0.0253999997,           0.
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*Element, type=C3D8
   1,  504,  505, 1707, 1569,   15,   16,  249,  248
   2,  505,  506, 1708, 1707,   16,   17,  250,  249
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*Nset, nset=_PickedSet5, internal, generate
    1,  3546,     1
*Elset, elset=_PickedSet5, internal, generate
    1,  2848,     1
** Section: SteelJohnsonCook
*Solid Section, elset=_PickedSet5, controls=EC-1, material="Johnson Cook-Modified"
,
*End Part
**
**
** ASSEMBLY
**
*Assembly, name=Assembly
**
*Instance, name=TargetPlate-1, part=TargetPlate
*End Instance
**
*Instance, name=SteelProjectile-1, part=SteelProjectile
          0.,           0., 0.01756220502393
          0.,           0., 0.01756220502393, -0.577350269189626, -0.577350269189626, 0.594912474213556,         120.
*End Instance
**
*Nset, nset=Clamp, instance=TargetPlate-1
    7,    8,    9,   10,   11,   12
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*Elset, elset=Clamp, instance=TargetPlate-1
 1506, 1507, 1508, 1509, 1510, 1511
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*Nset, nset=Set-4, instance=SteelProjectile-1
   1,   2,   3,   4,   5,   6
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*Elset, elset=Set-4, instance=SteelProjectile-1
    9,   19,   36,   38,   43,   73
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*Nset, nset=Set-5, instance=SteelProjectile-1, generate
   1,  301,    1
*Elset, elset=Set-5, instance=SteelProjectile-1, generate
    1,  1215,     1
*Nset, nset=Symmx, instance=TargetPlate-1
    2,    3,    5,    6,    8,   10
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*Nset, nset=Symmx, instance=SteelProjectile-1
  1,  2,  3,  6,  7,  8
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*Elset, elset=Symmx, instance=TargetPlate-1
  577,  578,  579,  580,  581,  582
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*Elset, elset=Symmx, instance=SteelProjectile-1
  39,  59,  69,  81,  87,  94
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*Nset, nset=Symmy, instance=TargetPlate-1
    1,    3,    4,    6,    7,    9
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*Nset, nset=Symmy, instance=SteelProjectile-1
   1,   3,   5,  19,  20,  21
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*Elset, elset=Symmy, instance=TargetPlate-1
    1,    2,    3,    4,    5,    6
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*Elset, elset=Symmy, instance=SteelProjectile-1
  627,  642,  649,  663,  735,  810
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*End Assembly
**
** ELEMENT CONTROLS
**
*Section Controls, name=EC-1, ELEMENT DELETION=YES
1., 1., 1.
**
** MATERIALS
**
*Material, name=HardSteel
*Density
8000.,
*Elastic
 4e+11, 0.3
*Material, name="Johnson Cook-Modified"
*Damage Initiation, criterion=JOHNSON COOK
 0.09,      0.,      0., -0.0596,      0.,      0.,      0.,  0.0001
*Damage Evolution, type=DISPLACEMENT, softening=TABULAR
     0.,      0.
 0.0016,   5e-05
 0.0064,  0.0001
 0.0144, 0.00015
 0.0256,  0.0002
   0.04, 0.00025
 0.0576,  0.0003
 0.0784, 0.00035
 0.1024,  0.0004
 0.1296, 0.00045
   0.16,  0.0005
 0.1936, 0.00055
 0.2304,  0.0006
     1., 0.00065
*Density
8000.,
*Elastic
 3.5e+11, 0.3
*Plastic, hardening=JOHNSON COOK
 9.8e+08, 9.95e+08,     0.45,       0.,       0.,       0.
*Rate Dependent, type=JOHNSON COOK
 0.0024, 0.0001
*Material, name="Johnson Cook-Modified-Hardened"
*Damage Initiation, criterion=JOHNSON COOK
 0.09,      0.,      0., -0.0596,      0.,      0.,      0.,  0.0001
*Damage Evolution, type=DISPLACEMENT, softening=TABULAR
     0.,      0.
 0.0016,   5e-05
 0.0064,  0.0001
 0.0144, 0.00015
 0.0256,  0.0002
   0.04, 0.00025
 0.0576,  0.0003
 0.0784, 0.00035
 0.1024,  0.0004
 0.1296, 0.00045
   0.16,  0.0005
 0.1936, 0.00055
 0.2304,  0.0006
     1., 0.00065
*Density
8000.,
*Elastic
 4e+11, 0.3
*Plastic, hardening=JOHNSON COOK
 9.8e+08, 9.95e+08,     0.45,       0.,       0.,       0.
*Rate Dependent, type=JOHNSON COOK
 0.0024, 0.0001
**
** INTERACTION PROPERTIES
**
*Surface Interaction, name=IntProp-1
*Friction
 0.42,
**
** BOUNDARY CONDITIONS
**
** Name: Clamp Type: Displacement/Rotation
*Boundary
Clamp, 1, 1
Clamp, 2, 2
Clamp, 3, 3
** Name: Symmx Type: Symmetry/Antisymmetry/Encastre
*Boundary
Symmx, XSYMM
** Name: Symmy Type: Symmetry/Antisymmetry/Encastre
*Boundary
Symmy, YSYMM
**
** PREDEFINED FIELDS
**
** Name: ProjectileVel   Type: Velocity
*Initial Conditions, type=VELOCITY
Set-5, 1, 0.
Set-5, 2, 0.
Set-5, 3, -1000.
** ----------------------------------------------------------------
**
** STEP: Step-1
**
*Step, name=Step-1, nlgeom=YES
*Dynamic, Explicit
, 0.00015
*Bulk Viscosity
0.06, 1.2
**
** OUTPUT REQUESTS
**
*Restart, write, number interval=1, time marks=NO
**
** FIELD OUTPUT: F-Output-1
**
*Output, field, number interval=100
*Node Output
A, RF, U, V
*Element Output, directions=YES
CFAILURE, DMICRT, ER, EVF, LE, NE, PE, PEEQ, PEEQVAVG, PEVAVG, S, SDEG, STATUS, SVAVG, TRIAX,YIELDS
*Contact Output
CSTRESS,
**
** HISTORY OUTPUT: H-Output-1
**
*Output, history, variable=PRESELECT
*End Step
