*************************************
*HEADING
ICEM - ABAQUS INTERFACES VERSION 4.3.1
*************************************
*MATERIAL, NAME=mat0
*MATERIAL, NAME=mat1
*MATERIAL, NAME=mat2
*MATERIAL, NAME=mat3
*NODE, NSET=All
1,  2.69422126E+00, -1.00000000E+00,  1.00000000E+00
2,  5.84298801E+00,  1.00000000E+00,  1.00000000E+00
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*ELEMENT,TYPE=C3D4,ELSET=PART4-MESH_ELSET
      4004,       511,      3462,      1342,       102
      4005,       502,      2099,      1331,      1317
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*ELEMENT,TYPE=C3D4,ELSET=PART2-MESH_ELSET
      4003,       214,      2787,      4835,       215
      4011,      1772,      4338,      4343,      1943
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*ELEMENT,TYPE=C3D4,ELSET=PART3-MESH_ELSET
      4006,      4561,      3862,      3868,      1571
      4009,      4532,      1477,      2841,      1522
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*ELEMENT,TYPE=C3D4,ELSET=PART1-MESH_ELSET
      4008,       266,      3084,        20,      1109
      4010,       312,      3438,      1294,      4881
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*SOLID SECTION, ELSET=PART4-MESH_ELSET, MATERIAL=mat3
*SOLID SECTION, ELSET=PART2-MESH_ELSET, MATERIAL=mat1
*SOLID SECTION, ELSET=PART3-MESH_ELSET, MATERIAL=mat2
*SOLID SECTION, ELSET=PART1-MESH_ELSET, MATERIAL=mat0
*NSET,NSET=PART1_NSET
         5,         9,        18,        19,        20,        21
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*NSET,NSET=PART2_NSET
         5,         7,         9,        12,        13,        14
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*NSET,NSET=PART3_NSET
         1,         2,         3,         4,         8,         9
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*NSET,NSET=PART4_NSET
         6,         9,        10,        11,        18,        25
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*NSET,NSET=PART4-MESH_NSET
         6,         9,        10,        11,        18,        25
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*NSET,NSET=PART2-MESH_NSET
         5,         7,         9,        12,        13,        14
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