*************************************
*HEADING
ICEM - ABAQUS INTERFACES VERSION 4.3.1
*************************************
*MATERIAL, NAME=mat0
*MATERIAL, NAME=mat1
*NODE, NSET=All
1,  9.95000005E-01,  9.95000005E-01,  9.95000005E-01
2,  9.95000005E-01,  9.95000005E-01,  4.99999523E-03
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*ELEMENT,TYPE=C3D8,ELSET=PART1_ELSET
        29,        14,        17,         2,        11,        21,        23,        24,        22
        30,        21,        23,        24,        22,        15,        18,         1,         9
*ELEMENT,TYPE=C3D8,ELSET=PART2_ELSET
        25,        12,         4,        17,        14,        26,        27,        23,        21
        26,        26,        27,        23,        21,        10,         3,        18,        15
*ELEMENT,TYPE=C3D8,ELSET=PART3_ELSET
        27,         8,        12,        14,        13,        25,        26,        21,        19
        28,        25,        26,        21,        19,         7,        10,        15,        16
        31,        13,        14,        11,         6,        19,        21,        22,        20
        32,        19,        21,        22,        20,        16,        15,         9,         5
*SOLID SECTION, ELSET=PART1_ELSET, MATERIAL=mat0
*SOLID SECTION, ELSET=PART2_ELSET, MATERIAL=mat1
*SOLID SECTION, ELSET=PART3_ELSET, MATERIAL=mat1
*NSET,NSET=PART1_NSET
         1,         2,         9,        11,        14,        15,        17,        18,        21,        22,        23,        24
*NSET,NSET=PART2_NSET
         3,         4,        10,        12,        14,        15,        17,        18,        21,        23,        26,        27
*NSET,NSET=PART3_NSET
         5,         6,         7,         8,         9,        10
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